*==============================================================================
*AUTHOR:  Tan Kiet HONG
*DATE:    2026-03-21
*DESCRIPTION: This is a sample of a nonlinear stationary thermic problem K(T)T=F, developed from the code 2a KT=F and Sphere.dgibi (quadrature template). Addtions:
*   - Uncertainty quantification on permeability Kint:
*       QUADRATU → quadrature points/weights
*       PARASTAT → sensitivity analysis
*       PROBDENS → PDF/CDF of shrinkage strain

*GEOMETRY: A rectangular cantilever beam of length 3 m and height 0.5 m.
*BOUNDARY CONDITIONS:
* - Imposed heat flux of 100 W/m² on the right edge (LDROITE).
* - Convection with a coefficient of 100 W/m²K on the top edge (LHAUT) and ambient temperature of 25 °C.
* - The left edge (LGAUCHE) is thermally insulated (no heat flux and has no imposed temperature) and fixed in space (no mechanical displacement).

*INPUTS:
* - KTHERMAL CONDUCTIVITY K:
*   K = KD*(1+4*(SL*PHI*RHO_L)/((1-PHI)*RHO_S))
*   KD(T)=KD0(1+A_K (T-T0))
*   WITH KD0=2, A_K=0.005, T0=20

*   SL = 0.2; PHI = 0.18; RHO_L = 1000.; RHO_S = 2500.;

* - CONVECTION COEFFICIENT: HCONVEC = 100.
* - AMBIENT TEMPERATURE: TLIBRE = 25.
* - IMPOSED HEAT FLUX: FLUXIMPOSE = 100.

*OUTPUTS:
* - TEMPERATURE FIELD T
*==============================================================================

*OPTIONS
OPTI ECHO 0;
OPTI 'DIME' 2 'ELEM' QUA4;

*==============================================================================
* 1) GEOMETRY AND MESH DEFINITION

*GEOMETRY DEFINITION
LONG    = 3.;
HAUT    = 0.5;

*NUMBER OF MESH SEGMENT
NLONG   = 35;
NHAUT   = 5;

*POINTS CREATION
PA      = 0. 0.;
PB      = LONG 0.;
PC      = LONG HAUT;
PD      = 0. HAUT;
*TRAC (PA ET PB ET PC ET PD);

*MESH LINES CREATION
LAB     = DROI NLONG PA PB;
LBC     = DROI NHAUT PB PC;
LCD     = DROI NLONG PC PD;
LDA     = DROI NHAUT PD PA;

*MESH SURFACE CREATION
MAIL1   = DALL LAB LBC LCD LDA;
*TRAC MAIL1;


*==============================================================================
* 2) PHYSICAL PROBLEM DEFINITION

*LINE DEFINITION FOR APPLYING BOUNDARY CONDITIONS
LHAUT    = LCD;
LBAS     = LAB;
LDROITE  = LBC;
LGAUCHE  = LDA;

*MATERIAL PROPERTY DEFINITION
KD0     = 2.;
A_K     = 0.005;
T0      = 20.;

SL      = 0.2;
PHI     = 0.18;
RHO_L   = 1000.;
RHO_S   = 2500.;

HCONVEC  = 100.;
TLIBRE   = 25.;
FLUXIMPOSE = 100.;

*==============================================================================
* 2A) CONDUCTIVITY K(T) CALCULATION
* Formula: K(T) = KD(T) * [1 + 4 * (SL * PHI * RHO_L) / ((1 - PHI) * RHO_S)]
* KD(T)=KD0(1+A_K (T-T0))
* Range: T = 0 to 100 with a step of 1

* Step-by-step calculation of the liquid phase multiplier (FEAU) to ensure mathematical operator priority in Cast3M
* FEAU = [1 + 4 * (SL * PHI * RHO_L) / ((1 - PHI) * RHO_S)]
temps1    = SL * PHI * RHO_L;
temps2  = (1. - PHI) * RHO_S;
FEAU    = 1. + (4. * temps1 / temps2);

* Temperature list for building K(T) curves (0° to 100°, step 1°)
tXT = PROG 0. PAS 1. 150.;
tYK = PROG;

* Build K(T) curve
REPE BOUCLE (DIME tXT);
* Extract the temperature value at index i
  tT_i = EXTR tXT &BOUCLE;
* Calculate KD at temperature tT_i
  tKD_i = KD0 * (1. + (A_K * (tT_i - T0)));
* Calculate Total Conductivity K
  tKT_i = tKD_i * FEAU;
* Append the result to the conductivity list
  tYK = tYK ET (PROG tKT_i);
FIN BOUCLE;

K_EVOL = EVOL MANU 'T' tXT 'K' tYK;
LIST K_EVOL;
DESS K_EVOL;

*MODEL DEFINITION
MOD1     = MODE MAIL1 THERMIQUE ISOTROPE;
MOD2     = MODE LHAUT THERMIQUE CONVECTION;
MOD_TOT  = MOD1 ET MOD2;

*MATERIAL DEFINITION
MAT1     = MATE MOD1 'K' K_EVOL;
MAT2     = MATE MOD2 'H' HCONVEC;
MAT_TOT = MAT1 ET MAT2;

*==============================================================================
* 2B) TIME DISCRETIZATION
* Pseudo-transient: PASAPAS requires time steps even for steady-state problems
* TFIN and dt are artificial — only the final converged state matters
TFIN    = 1000.;
LTEMPS1 = PROG 0. PAS 100. TFIN;

* INITIAL CONDITION (for every mesh node at initital temperature)
T_INI   = T0;
T0_CHPO = MANU 'CHPO' MAIL1 'T' T_INI;

*==============================================================================
* 3) RESOLUTION (PASAPAS NONLINEAR SOLVER)

*THERMAL BOUNDARY CONDITIONS DEFINITION
*SOLVING K(T)T=F

*IMPOSED HEAT FLUX on LDROITE
EV_FLUX = EVOL MANU 'TEMPS' (PROG 0. TFIN) 'T' (PROG 1. 1.);
FLT2_0  = FLUX MOD1 LDROITE FLUXIMPOSE;
FLT2    = CHAR 'Q' FLT2_0 EV_FLUX;
*CONVECTION LOAD VECTOR on LHAUT
CONV1   = MANU 'CHPO' LHAUT 1 'T' TLIBRE 'NATURE' 'DISCRETE';
EV_CONV = EVOL MANU 'TEMPS' (PROG 0. TFIN) 'T' (PROG 1. 1.);
CHAR_CV = CHAR 'TECO' CONV1 EV_CONV;

*RESOLUTION PASAPAS (nonlinear thermal)
TAB1 = TABLE;
TAB1.TEMPERATURES        = TABLE;
TAB1.TEMPERATURES.0      = T0_CHPO;
TAB1.MODELE              = MOD_TOT;
TAB1.CARACTERISTIQUES    = MAT_TOT;
TAB1.CHARGEMENT          = FLT2 ET CHAR_CV;
TAB1.PROCEDURE_THERMIQUE = NONLINEAIRE;
TAB1.RELAXATION_THETA    = 0.57;
TAB1.TEMPS_CALCULES      = LTEMPS1;

PASAPAS TAB1;

*VISUALIZATION
NBT  = DIME TAB1.TEMPERATURES;
TRES = TAB1.TEMPERATURES.(NBT - 1);
TRAC TRES MAIL1;
